ORIGIN := 1
GDP := [
    1.305; 1.456; 1.351; 1.343; 1.42; 1.361; 1.33; 1.268; 1.355; 1.34
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]
Life := [
    0.874; 0.861; 0.868; 0.914; 0.927; 0.878; 0.896; 0.876; 0.913; 0.91
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]
μGDP := sum(GDP[i], i = 1 .. 156)/156
μLife := sum(Life[i], i = 1 .. 156)/156
μGDP = 0.891449
μLife = 0.597346
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σGDP := sqrt(sum((GDP[i] - μGDP)^2, i = 1 .. 156)/156)
σLife := sqrt(sum((Life[i] - μLife)^2, i = 1 .. 156)/156)
σGDP = 0.390663
σLife = 0.246784
GDPnew := (GDP - μGDP)/σGDP
Lifenew := (Life - μLife)/σLife
GDPnew = [
    1.05859; 1.44511; 1.17634; 1.15586; 1.35296; 1.20194; 1.12258; 0.963878; 1.18658; 1.14818
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]
Lifenew = [
    1.12104; 1.06836; 1.09672; 1.28312; 1.3358; 1.13725; 1.21018; 1.12914; 1.27907; 1.26691
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]
max(GDP) = 2.096
max(Life) = 1.03
min(Life) = 0
min(GDP) = 0
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C := [
    sum((GDPnew[i] - 0)^2, i = 1 .. 156)/156, sum((GDPnew[i] - 0)*(Lifenew[i] - 0), i = 1 .. 156)/156;
    sum((Lifenew[i] - 0)*(GDPnew[i] - 0), i = 1 .. 156)/156, sum((Lifenew[i] - 0)^2, i = 1 .. 156)/156
]
C = [1, 0.844273; 0.844273, 1]
EG(λ) := C - λ*[1, 0; 0, 1] → [1 - λ, 0.844273227595; 0.844273227595, 1.0 - λ]
[1 - λ, 0.844273227595; 0.844273227595, 1.0 - λ]
λ^2 - 2.0*λ + 0.287202717167
λ := [0.155726772405; 1.84427322759]
0.15/(0.15 + 1.844)
C - λ[1]*[1, 0; 0, 1] → [0.844273227595, 0.844273227595; 0.844273227595, 0.844273227595]
[0.844273227595, 0.844273227595; 0.844273227595, 0.844273227595]*[ν1[x]; ν1[y]] → [0.844273227595*ν1[x] + 0.844273227595*ν1[y]; 0.844273227595*ν1[x] + 0.844273227595*ν1[y]]
0.844273227595*ν1[x] + 0.844273227595*ν1[y] = 0  # error: Эта переменная неопределена.
e1 := [-1/sqrt((-1)^2 + 1^2); 1/sqrt((-1)^2 + 1^2)]
e1 = [-0.707107; 0.707107]
ν1 := [-1; 1]
C - λ[2]*[1, 0; 0, 1] → [-0.844273227595, 0.844273227595; 0.844273227595, -0.844273227595]
-0.844273227595*ν2[x] + 0.844273227595*ν2[y] = 0  # error: Эта переменная неопределена.
[-0.844273227595, 0.844273227595; 0.844273227595, -0.844273227595]*[ν2[x]; ν2[y]] → [-0.844273227595*ν2[x] + 0.844273227595*ν2[y]; 0.844273227595*ν2[x] + (-0.844273227595*ν2[y])]
ν2 := [1; 1]
e2 := [
    0.844273227595/sqrt(0.844273227595^2 + 0.844273227595^2);
    0.844273227595/sqrt(0.844273227595^2 + 0.844273227595^2)
]
e2 := [1/sqrt(1^2 + 1^2); 1/sqrt(1^2 + 1^2)]
e2 = [0.707107; 0.707107]
eigenvals(C) = [1.84427; 0.155727]
eigenvecs(C) = [0.707107, -0.707107; 0.707107, 0.707107]
ye1(x) := e1[1]*x/e1[2]
ye2(x) := e2[1]*x/e2[2]
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PC1 := GDPnew*e1[1] + Lifenew*e1[2]
PC2 := GDPnew*e2[1] + Lifenew*e2[2]
PC1 = [
    0.0441571; -0.266404; -0.0562954; 0.0899879; -0.0121348; -0.0457428; 0.061943; 0.116858; 0.0654024; 0.0839568
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]
PC2 = [
    1.54123; 1.77729; 1.6073; 1.72462; 1.90124; 1.65405; 1.64951; 1.47999; 1.74348; 1.70773
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]
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